// SBML level 3 version 2

model biocrnpyler_80045()
  // model units - substance: mole, time: second, volume: litre, area: square_metre, length: metre, extent: mole

  // Compartments:
  compartment cytosol = 1e-6;
  compartment default = 1e-6;

  // Species:
  species Glutamic_acid_cytosol in cytosol = 0;
  species Arginine_cytosol in cytosol = 0;
  species Ornithine_cytosol in cytosol = 0;
  species Spermine_cytosol in cytosol = 0;
  species Putrescine_cytosol in cytosol = 0;
  species Agmatine_cytosol in cytosol = 0;
  species Spermidine_cytosol in cytosol = 0;
  species Arg2_enzyme in default = 0;
  species AsADC_enzyme in default = 0;
  species speB_enzyme in default = 0;
  species Car1_enzyme in default = 0;
  species Spe1_enzyme in default = 0;
  species Fms1_enzyme in default = 0;
  species Repressor1 in default = 0;
  species Repressor2 in default = 0;

  // Reactions:
  r0: Glutamic_acid_cytosol => Arginine_cytosol; r0_k*Arg2_enzyme^r0_n/(r0_K^r0_n + Arg2_enzyme^r0_n);  // modifiers: Arg2_enzyme
    r0_k = 0.1; r0_K = 5; r0_n = 2;
  r1: Arginine_cytosol => Agmatine_cytosol; r1_k*AsADC_enzyme^r1_n/(r1_K^r1_n + AsADC_enzyme^r1_n);  // modifiers: AsADC_enzyme
    r1_k = 0.1; r1_K = 5; r1_n = 2;
  r2: Agmatine_cytosol => Putrescine_cytosol; r2_k*speB_enzyme^r2_n/(r2_K^r2_n + speB_enzyme^r2_n);  // modifiers: speB_enzyme
    r2_k = 0.1; r2_K = 5; r2_n = 2;
  r3: Arginine_cytosol => Ornithine_cytosol; r3_k*Car1_enzyme^r3_n/(r3_K^r3_n + Car1_enzyme^r3_n);  // modifiers: Car1_enzyme
    r3_k = 0.1; r3_K = 5; r3_n = 2;
  r4: Arginine_cytosol => Ornithine_cytosol; r4_k/(1 + (Repressor1/r4_K)^r4_n);  // modifiers: Repressor1
    r4_k = 0.08; r4_K = 5; r4_n = 2;
  r5: Ornithine_cytosol => Putrescine_cytosol; r5_k*Spe1_enzyme^r5_n/(r5_K^r5_n + Spe1_enzyme^r5_n);  // modifiers: Spe1_enzyme
    r5_k = 0.1; r5_K = 5; r5_n = 2;
  r6: Spermine_cytosol => Spermidine_cytosol; r6_k*Fms1_enzyme^r6_n/(r6_K^r6_n + Fms1_enzyme^r6_n);  // modifiers: Fms1_enzyme
    r6_k = 0.1; r6_K = 5; r6_n = 2;
  r7: Spermidine_cytosol => Putrescine_cytosol; r7_k*Fms1_enzyme^r7_n/(r7_K^r7_n + Fms1_enzyme^r7_n);  // modifiers: Fms1_enzyme
    r7_k = 0.1; r7_K = 5; r7_n = 2;
  r8: Spermidine_cytosol => Putrescine_cytosol; r8_k/(1 + (Repressor2/r8_K)^r8_n);  // modifiers: Repressor2
    r8_k = 0.09; r8_K = 5; r8_n = 2;

  // Unit definitions:
  unit square_metre = metre^2;
end
