// SBML level 3 version 2

model biocrnpyler_61047()
  // model units - substance: mole, time: second, volume: litre, area: square_metre, length: metre, extent: mole

  // Compartments:
  compartment cytosol = 1e-6;
  compartment peroxisome = 1e-6;
  compartment ER = 1e-6;

  // Species:
  species Putrescine_cytosol in cytosol = 0;
  species N_methylputrescine_cytosol in cytosol = 0;
  species intermediate_4_Methylaminobutanal_cytosol in cytosol = 0;
  species N_Methyl__1_pyrrolinium_cytosol in cytosol = 0; N_Methyl__1_pyrrolinium_cytosol is "N_Methyl_Δ1_pyrrolinium";
  species intermediate_4_1_Methyl_2_pyrrodinyl_3_oxobutanoic_acids_cytosol in cytosol = 0;
  species Tropinone_cytosol in cytosol = 0;
  species Tropine_cytosol in cytosol = 0;
  species enzyme_AbPMT1_enzyme_cytosol in cytosol = 0;
  species enzyme_DsPMT1_enzyme_cytosol in cytosol = 0;
  species enzyme_DmMPO1_C_PTS1_enzyme_peroxisome in peroxisome = 0; enzyme_DmMPO1_C_PTS1_enzyme_peroxisome is "DmMPO1ΔC_PTS1_enzyme";
  species enzyme_AbPYKS_enzyme_and_2x_malonyl_CoA_molecules_cytosol in cytosol = 0;
  species enzyme_AbCYP82M3_enzyme_ER in ER = 0;
  species enzyme_AtATR1_enzyme_ER in ER = 0;
  species enzyme_DsTR1_enzyme_cytosol in cytosol = 0;

  // Reactions:
  r0: Putrescine_cytosol + enzyme_AbPMT1_enzyme_cytosol + enzyme_DsPMT1_enzyme_cytosol => N_methylputrescine_cytosol; r0_k_forward*Putrescine_cytosol*enzyme_AbPMT1_enzyme_cytosol*enzyme_DsPMT1_enzyme_cytosol;
    r0_k_forward = 3;
  r1: N_methylputrescine_cytosol + => intermediate_4_Methylaminobutanal_cytosol; r1_k_forward*N_methylputrescine_cytosol*enzyme_DmMPO1;
    r1_k_forward = 1.4;
  r2: intermediate_4_Methylaminobutanal_cytosol => ; r2_k_forward*intermediate_4_Methylaminobutanal_cytosol;
    r2_k_forward = 1;
  r3: + enzyme_AbPYKS_enzyme_and_2x_malonyl_CoA_molecules_cytosol => intermediate_4_1_Methyl_2_pyrrodinyl_3_oxobutanoic_acids_cytosol; r3_k_forward*N_Methyl_;
    r3_k_forward = 1;
  r4: intermediate_4_1_Methyl_2_pyrrodinyl_3_oxobutanoic_acids_cytosol + enzyme_AbCYP82M3_enzyme_ER + enzyme_AtATR1_enzyme_ER => Tropinone_cytosol; r4_k_forward*intermediate_4_1_Methyl_2_pyrrodinyl_3_oxobutanoic_acids_cytosol*enzyme_AbCYP82M3_enzyme_ER*enzyme_AtATR1_enzyme_ER;
    r4_k_forward = 1;
  r5: Tropinone_cytosol + enzyme_DsTR1_enzyme_cytosol => Tropine_cytosol; r5_k_forward*Tropinone_cytosol*enzyme_DsTR1_enzyme_cytosol;
    r5_k_forward = 1;

  // Unit definitions:
  unit square_metre = metre^2;
end
