// SBML level 3 version 2

model biocrnpyler_355512()
  // model units - substance: mole, time: second, volume: litre, area: square_metre, length: metre, extent: mole

  // Compartments:
  compartment cytosol = 1e-6;
  compartment default = 1e-6;

  // Species:
  species Putrescine_cytosol in cytosol = 0;
  species N_methylputrescine_cytosol in cytosol = 0;
  species intermediate_4_Methylaminobutanal_cytosol in cytosol = 0;
  species N_Methyl_Delta1_pyrrolinium_cytosol in cytosol = 0;
  species intermediate_4_1_Methyl_2_pyrrodinyl_3_oxobutanoic_acids_cytosol in cytosol = 0;
  species Tropinone_cytosol in cytosol = 0;
  species Tropine_cytosol in cytosol = 0;
  species AbPMT1_enzyme in default = 0;
  species DsPMT1_enzyme in default = 0;
  species DmMPO1_C_PTS1_enzyme in default = 0; DmMPO1_C_PTS1_enzyme is "DmMPO1ΔC_PTS1_enzyme";
  species AbPYKS_enzyme in default = 0;
  species AbCYP82M3_enzyme in default = 0;
  species AtATR1_enzyme in default = 0;
  species DsTR1_enzyme in default = 0;

  // Reactions:
  r0: Putrescine_cytosol => N_methylputrescine_cytosol; r0_k*AbPMT1_enzyme^r0_n/(r0_K^r0_n + AbPMT1_enzyme^r0_n);  // modifiers: AbPMT1_enzyme
    r0_k = 0.1; r0_K = 5; r0_n = 2;
  r1: N_methylputrescine_cytosol => intermediate_4_Methylaminobutanal_cytosol; r1_k*DmMPO1;  // modifiers: 
    r1_k = 0.1; r1_K = 5; r1_n = 2;
  r2: intermediate_4_Methylaminobutanal_cytosol => N_Methyl_Delta1_pyrrolinium_cytosol; r2_k*DsPMT1_enzyme^r2_n/(r2_K^r2_n + DsPMT1_enzyme^r2_n);  // modifiers: DsPMT1_enzyme
    r2_k = 0.1; r2_K = 5; r2_n = 2;
  r3: N_Methyl_Delta1_pyrrolinium_cytosol => intermediate_4_1_Methyl_2_pyrrodinyl_3_oxobutanoic_acids_cytosol; r3_k*AbPYKS_enzyme^r3_n/(r3_K^r3_n + AbPYKS_enzyme^r3_n);  // modifiers: AbPYKS_enzyme
    r3_k = 0.1; r3_K = 5; r3_n = 2;
  r4: intermediate_4_1_Methyl_2_pyrrodinyl_3_oxobutanoic_acids_cytosol => Tropinone_cytosol; r4_k*AbCYP82M3_enzyme^r4_n/(r4_K^r4_n + AbCYP82M3_enzyme^r4_n);  // modifiers: AbCYP82M3_enzyme
    r4_k = 0.1; r4_K = 5; r4_n = 2;
  r5: Tropinone_cytosol => Tropine_cytosol; r5_k*DsTR1_enzyme^r5_n/(r5_K^r5_n + DsTR1_enzyme^r5_n);  // modifiers: DsTR1_enzyme
    r5_k = 0.1; r5_K = 5; r5_n = 2;

  // Unit definitions:
  unit square_metre = metre^2;
end
