// SBML level 3 version 2

model biocrnpyler_83130()
  // model units - substance: mole, time: second, volume: litre, area: square_metre, length: metre, extent: mole

  // Compartments:
  compartment cytosol = 1e-6;
  compartment peroxisome = 1e-6;
  compartment ER = 1e-6;

  // Species:
  species Putrescine_cytosol in cytosol = 0;
  species N_Methylputrescine_cytosol in cytosol = 0;
  species Methylaminobutanal_peroxisome in peroxisome = 0;
  species N_Methyl_Delta1_Pyrrolinium_cytosol in cytosol = 0;
  species PKS_Intermediate_cytosol in cytosol = 0;
  species Tropinone_ER in ER = 0;
  species Tropine_cytosol in cytosol = 0;
  species Malonyl_CoA_cytosol in cytosol = 0;
  species AbPMT1_enzyme_cytosol in cytosol = 0;
  species DsPMT1_enzyme_cytosol in cytosol = 0;
  species DmMPO1_C_PTS1_enzyme_peroxisome in peroxisome = 0; DmMPO1_C_PTS1_enzyme_peroxisome is "DmMPO1ΔC_PTS1_enzyme";
  species AbPYKS_enzyme_and_2x_malonyl_CoA_molecules_cytosol in cytosol = 0;
  species AbCYP82M3_enzyme_ER in ER = 0;
  species AtATR1_enzyme_ER in ER = 0;
  species DsTR1_enzyme_cytosol in cytosol = 0;

  // Reactions:
  r0: Putrescine_cytosol => N_Methylputrescine_cytosol; r0_k*AbPMT1_enzyme_cytosol^r0_n/(r0_K^r0_n + AbPMT1_enzyme_cytosol^r0_n);  // modifiers: AbPMT1_enzyme_cytosol
    r0_k = 2.5; r0_K = 0.15; r0_n = 1;
  r1: Putrescine_cytosol => N_Methylputrescine_cytosol; r1_k*DsPMT1_enzyme_cytosol^r1_n/(r1_K^r1_n + DsPMT1_enzyme_cytosol^r1_n);  // modifiers: DsPMT1_enzyme_cytosol
    r1_k = 2; r1_K = 0.12; r1_n = 1;
  r2: N_Methylputrescine_cytosol => Methylaminobutanal_peroxisome; r2_k*DmMPO1;  // modifiers: 
    r2_k = 1.8; r2_K = 0.05; r2_n = 1;
  r3: Methylaminobutanal_peroxisome => N_Methyl_Delta1_Pyrrolinium_cytosol; r3_k*Methylaminobutanal_peroxisome^r3_n/(r3_K^r3_n + Methylaminobutanal_peroxisome^r3_n);
    r3_k = 0.03; r3_K = 1; r3_n = 1;
  r4: N_Methyl_Delta1_Pyrrolinium_cytosol + Malonyl_CoA_cytosol => PKS_Intermediate_cytosol; r4_k*AbPYKS_enzyme_and_2x_malonyl_CoA_molecules_cytosol^r4_n/(r4_K^r4_n + AbPYKS_enzyme_and_2x_malonyl_CoA_molecules_cytosol^r4_n);  // modifiers: AbPYKS_enzyme_and_2x_malonyl_CoA_molecules_cytosol
    r4_k = 0.8; r4_K = 0.1; r4_n = 1;
  r5: PKS_Intermediate_cytosol => Tropinone_ER; r5_k*AbCYP82M3_enzyme_ER^r5_n/(r5_K^r5_n + AbCYP82M3_enzyme_ER^r5_n);  // modifiers: AbCYP82M3_enzyme_ER
    r5_k = 0.6; r5_K = 0.05; r5_n = 1;
  r6: PKS_Intermediate_cytosol => Tropinone_ER; r6_k*AtATR1_enzyme_ER^r6_n/(r6_K^r6_n + AtATR1_enzyme_ER^r6_n);  // modifiers: AtATR1_enzyme_ER
    r6_k = 0.6; r6_K = 0.05; r6_n = 1;
  r7: Tropinone_ER => Tropine_cytosol; r7_k*DsTR1_enzyme_cytosol^r7_n/(r7_K^r7_n + DsTR1_enzyme_cytosol^r7_n);  // modifiers: DsTR1_enzyme_cytosol
    r7_k = 3.2; r7_K = 0.08; r7_n = 1;

  // Unit definitions:
  unit square_metre = metre^2;
end
